# OpenSim document version 40500
ForceSet gait2354_RRA:
  PointActuator FX: body=pelvis point=(-0.0724376 0 0) point_is_global=false direction=(1 0 0) force_is_global=true
      optimal_force=4
  PointActuator FY: body=pelvis point=(-0.0724376 0 0) point_is_global=false direction=(0 1 0) force_is_global=true
      optimal_force=8
  PointActuator FZ: body=pelvis point=(-0.0724376 0 0) point_is_global=false direction=(0 0 1) force_is_global=true
      optimal_force=4
  TorqueActuator MX: bodyA=pelvis bodyB=ground torque_is_global=true axis=(1 0 0) optimal_force=2
  TorqueActuator MY: bodyA=pelvis bodyB=ground torque_is_global=true axis=(0 1 0) optimal_force=2
  TorqueActuator MZ: bodyA=pelvis bodyB=ground torque_is_global=true axis=(0 0 1) optimal_force=2
  CoordinateActuator hip_flexion_r: coordinate=hip_flexion_r optimal_force=300
  CoordinateActuator hip_adduction_r: coordinate=hip_adduction_r optimal_force=200
  CoordinateActuator hip_rotation_r: coordinate=hip_rotation_r optimal_force=100
  CoordinateActuator knee_flexion_r: coordinate=knee_flexion_r optimal_force=300
  CoordinateActuator ankle_dorsiflexion_r: coordinate=ankle_dorsiflexion_r optimal_force=300
  CoordinateActuator hip_flexion_l: coordinate=hip_flexion_l optimal_force=300
  CoordinateActuator hip_adduction_l: coordinate=hip_adduction_l optimal_force=200
  CoordinateActuator hip_rotation_l: coordinate=hip_rotation_l optimal_force=100
  CoordinateActuator knee_flexion_l: coordinate=knee_flexion_l optimal_force=300
  CoordinateActuator ankle_dorsiflexion_l: coordinate=ankle_dorsiflexion_l optimal_force=300
