# OpenSim document version 40500
ControlSet RRA Control Constraints:
  ControlLinear [values shared by the 16 below unless stated]: is_model_control=true extrapolate=true filter_on=false
      use_steps=false kp=100 kv=20
  ControlLinear FX.excitation: default_min=-20 default_max=20
  ControlLinear FY.excitation: default_min=-20 default_max=20
  ControlLinear FZ.excitation: default_min=-20 default_max=20
  ControlLinear MX.excitation: default_min=-50 default_max=50
  ControlLinear MY.excitation: default_min=-50 default_max=50
  ControlLinear MZ.excitation: default_min=-50 default_max=50
  ControlLinear hip_flexion_r.excitation: default_min=-1 default_max=1
  ControlLinear hip_adduction_r.excitation: default_min=-1 default_max=1
  ControlLinear hip_rotation_r.excitation: default_min=-1 default_max=1
  ControlLinear knee_flexion_r.excitation: default_min=-1 default_max=1
  ControlLinear ankle_dorsiflexion_r.excitation: default_min=-1 default_max=1
  ControlLinear hip_flexion_l.excitation: default_min=-1 default_max=1
  ControlLinear hip_adduction_l.excitation: default_min=-1 default_max=1
  ControlLinear hip_rotation_l.excitation: default_min=-1 default_max=1
  ControlLinear knee_flexion_l.excitation: default_min=-1 default_max=1
  ControlLinear ankle_dorsiflexion_l.excitation: default_min=-1 default_max=1
