# OpenSim document version 40500
Model human0714:
  gravity: 0 -9.80665 0
  Ground
  BodySet:
    Body pelvis: mass=11.777 [kg] mass_center=(-0.0707 0 0) inertia=(0.1028 0.0871 0.0579 0 0 0)
        meshes=(sacrum.vtp pelvis.vtp l_pelvis.vtp)
    Body femur_r: mass=9.3014 mass_center=(0 -0.17 0) inertia=(0.1339 0.0351 0.1412 0 0 0) meshes=femur.vtp
    Body tibia_r: mass=3.7075 mass_center=(0 -0.1867 0) inertia=(0.0504 0.0051 0.0511 0 0 0)
        meshes=(tibia_r.vtp fibula.vtp)
    Body calcn_r: mass=1.25 mass_center=(0.1 0.03 0) inertia=(0.0014 0.0039 0.0041 0 0 0)
        meshes=(talus.vtp bofoot.vtp foot.vtp)
    Body femur_l: mass=9.3014 mass_center=(0 -0.17 0) inertia=(0.1339 0.0351 0.1412 0 0 0) meshes=l_femur.vtp
    Body tibia_l: mass=3.7075 mass_center=(0 -0.1867 0) inertia=(0.0504 0.0051 0.0511 0 0 0)
        meshes=(tibia_l.vtp l_fibula.vtp)
    Body calcn_l: mass=1.25 mass_center=(0.1 0.03 0) inertia=(0.0014 0.0039 0.0041 0 0 0)
        meshes=(l_talus.vtp l_bofoot.vtp l_foot.vtp)
    Body torso: mass=34.2366 mass_center=(-0.03 0.32 0) inertia=(1.4745 0.7555 1.4314 0 0 0)
        meshes=(hat_spine.vtp hat_jaw.vtp hat_skull.vtp hat_ribs.vtp)
  JointSet:
    CustomJoint ground_pelvis: socket_parent_frame=ground_offset socket_child_frame=pelvis_offset
      Coordinate pelvis_tilt: range=(-1.570796 1.570796)
      Coordinate pelvis_tx: range=(-5 5)
      Coordinate pelvis_ty: default_value=0.93 range=(-1 2)
      PhysicalOffsetFrame ground_offset: socket_parent=/ground translation=(0 0 0) [meters]
      PhysicalOffsetFrame pelvis_offset: socket_parent=/bodyset/pelvis translation=(0 0 0)
      SpatialTransform: axes_held_at_zero=(rotation1 rotation2 translation3)
        TransformAxis rotation3: coordinates=pelvis_tilt axis=(0 0 1) LinearFunction(coefficients=1 0)
        TransformAxis translation1: coordinates=pelvis_tx axis=(1 0 0) LinearFunction(coefficients=1 0)
        TransformAxis translation2: coordinates=pelvis_ty axis=(0 1 0) LinearFunction(coefficients=1 0)
    CustomJoint hip_r: socket_parent_frame=pelvis_offset socket_child_frame=femur_r_offset
      Coordinate hip_flexion_r: range=(-2.094395 2.094395)
      PhysicalOffsetFrame pelvis_offset: socket_parent=/bodyset/pelvis translation=(-0.0707 -0.0661 0.0835)
      PhysicalOffsetFrame femur_r_offset: socket_parent=/bodyset/femur_r translation=(0 0 0)
      SpatialTransform: axes_held_at_zero=(rotation1 rotation2 translation1 translation2 translation3)
        TransformAxis rotation3: coordinates=hip_flexion_r axis=(0 0 1) LinearFunction(coefficients=1 0)
    CustomJoint hip_l: socket_parent_frame=pelvis_offset socket_child_frame=femur_l_offset
      Coordinate hip_flexion_l: range=(-2.094395 2.094395)
      PhysicalOffsetFrame pelvis_offset: socket_parent=/bodyset/pelvis translation=(-0.0707 -0.0661 -0.0835)
      PhysicalOffsetFrame femur_l_offset: socket_parent=/bodyset/femur_l translation=(0 0 0)
      SpatialTransform: axes_held_at_zero=(rotation1 rotation2 translation1 translation2 translation3)
        TransformAxis rotation3: coordinates=hip_flexion_l axis=(0 0 1) LinearFunction(coefficients=1 0)
    CustomJoint knee_r: socket_parent_frame=femur_r_offset socket_child_frame=tibia_r_offset
      Coordinate knee_flexion_r: range=(-2.094395 0.1745329)
      PhysicalOffsetFrame femur_r_offset: socket_parent=/bodyset/femur_r translation=(0 -0.396 0)
      PhysicalOffsetFrame tibia_r_offset: socket_parent=/bodyset/tibia_r translation=(0 0 0)
      SpatialTransform: axes_held_at_zero=(rotation1 rotation2 translation1 translation2 translation3)
        TransformAxis rotation3: coordinates=knee_flexion_r axis=(0 0 1) LinearFunction(coefficients=1 0)
    PinJoint knee_l: socket_parent_frame=femur_l_offset socket_child_frame=tibia_l_offset
      Coordinate knee_flexion_l: range=(-2.094395 0.1745329) clamped=true
      PhysicalOffsetFrame femur_l_offset: socket_parent=/bodyset/femur_l translation=(0 -0.396 0)
      PhysicalOffsetFrame tibia_l_offset: socket_parent=/bodyset/tibia_l translation=(0 0 0)
    PinJoint ankle_r: socket_parent_frame=tibia_r_offset socket_child_frame=calcn_r_offset
      Coordinate ankle_dorsiflexion_r: range=(-1.047198 1.047198)
      PhysicalOffsetFrame tibia_r_offset: socket_parent=/bodyset/tibia_r translation=(0 -0.43 0)
      PhysicalOffsetFrame calcn_r_offset: socket_parent=/bodyset/calcn_r translation=(0.04877 0.04195 -0.00792)
    PinJoint ankle_l: socket_parent_frame=tibia_l_offset socket_child_frame=calcn_l_offset
      Coordinate ankle_dorsiflexion_l: range=(-1.047198 1.047198)
      PhysicalOffsetFrame tibia_l_offset: socket_parent=/bodyset/tibia_l translation=(0 -0.43 0)
      PhysicalOffsetFrame calcn_l_offset: socket_parent=/bodyset/calcn_l translation=(0.04877 0.04195 0.00792)
    WeldJoint back: socket_parent_frame=pelvis_offset socket_child_frame=torso_offset
      PhysicalOffsetFrame pelvis_offset: socket_parent=/bodyset/pelvis translation=(-0.1007 0.0815 0)
      PhysicalOffsetFrame torso_offset: socket_parent=/bodyset/torso translation=(0 0 0)
  ForceSet:
    Millard2012EquilibriumMuscle [values shared by the 14 below unless stated]:
      ActiveForceLengthCurve: minimum_value=0
      ForceVelocityCurve: concentric_slope_at_vmax=0 concentric_slope_near_vmax=0.25 isometric_slope=5
          eccentric_slope_at_vmax=0 eccentric_slope_near_vmax=0.15 max_eccentric_velocity_force_multiplier=1.4
      FiberForceLengthCurve
      TendonForceLengthCurve
    Millard2012EquilibriumMuscle hamstrings_r: min_control=0.01 max_control=1 max_isometric_force=2594
        optimal_fiber_length=0.109 tendon_slack_length=0.31 pennation_angle_at_optimal=0 [radians]
      PathPoint bifemlh_r-P1: pelvis (-0.12596 -0.10257 0.06944)
      PathPoint bifemlh_r-P2: tibia_r (-0.028 -0.02 0.02943)
      PathPoint bifemlh_r-P3: tibia_r (-0.021 -0.04 0.0343)
    Millard2012EquilibriumMuscle glut_max_r: min_control=0.01 max_control=1 max_isometric_force=1944
        optimal_fiber_length=0.147 tendon_slack_length=0.127 pennation_angle_at_optimal=0
      PathPoint glut_max2_r-P1: pelvis (-0.1349 0.0176 0.0563)
      PathPoint glut_max2_r-P2: pelvis (-0.1376 -0.052 0.0914)
      PathPoint glut_max2_r-P3: femur_r (-0.0426 -0.053 0.0293)
      PathPoint glut_max2_r-P4: femur_r (-0.0156 -0.1016 0.0419)
    Millard2012EquilibriumMuscle iliopsoas_r: min_control=0.01 max_control=1 max_isometric_force=2342
        optimal_fiber_length=0.1 tendon_slack_length=0.163 pennation_angle_at_optimal=0.1396263
      PathPoint psoas_r-P1: pelvis (-0.0647 0.0887 0.0289)
      PathPoint psoas_r-P2: pelvis (-0.03 -0.01 0.076)
      PathPoint psoas_r-P4: femur_r (0.033 -0.035 0.0038)
      PathPoint psoas_r-P5: femur_r (-0.0188 -0.0597 0.0104)
    Millard2012EquilibriumMuscle vasti_r: min_control=0.01 max_control=1 max_isometric_force=4530
        optimal_fiber_length=0.087 tendon_slack_length=0.136 pennation_angle_at_optimal=0.5235988
      PathPoint vas_int_r-P1: femur_r (0.029 -0.1924 0.031)
      PathPoint vas_int_r-P2: femur_r (0.0335 -0.2084 0.0285)
      PathPoint default: tibia_r (0.04 0.025 0.0018)
    Millard2012EquilibriumMuscle gastroc_r: min_control=0.01 max_control=1 max_isometric_force=2241
        optimal_fiber_length=0.06 tendon_slack_length=0.39 pennation_angle_at_optimal=0.296706
      PathPoint med_gas_r-P1: femur_r (-0.02 -0.386 -0.024)
      PathPoint med_gas_r-P2: calcn_r (0 0.031 -0.0053)
    Millard2012EquilibriumMuscle soleus_r: min_control=0.01 max_control=1 max_isometric_force=3549
        optimal_fiber_length=0.05 tendon_slack_length=0.25 pennation_angle_at_optimal=0.4363323
      PathPoint P1: tibia_r (-0.0024 -0.1533 0.0071)
      PathPoint P2: calcn_r (0 0.031 -0.0053)
    Millard2012EquilibriumMuscle tibia_r: min_control=0.01 max_control=1 max_isometric_force=1759
        optimal_fiber_length=0.098 tendon_slack_length=0.223 pennation_angle_at_optimal=0.08726646
      PathPoint tib_ant_r-P1: tibia_r (0.0179 -0.1624 0.0115)
      PathPoint tib_ant_r-P2: tibia_r (0.0329 -0.3951 -0.0177)
      PathPoint tib_ant_r-P3: calcn_r (0.1166 0.0178 -0.0305)
    Millard2012EquilibriumMuscle hamstrings_l: min_control=0.01 max_control=1 max_isometric_force=2594
        optimal_fiber_length=0.109 tendon_slack_length=0.31 pennation_angle_at_optimal=0
      PathPoint bifemlh_l-P1: pelvis (-0.12596 -0.10257 -0.06944)
      PathPoint bifemlh_l-P2: tibia_l (-0.028 -0.02 -0.02943)
      PathPoint bifemlh_l-P3: tibia_l (-0.021 -0.04 -0.0343)
    Millard2012EquilibriumMuscle glut_max_l: min_control=0.01 max_control=1 max_isometric_force=1944
        optimal_fiber_length=0.147 tendon_slack_length=0.127 pennation_angle_at_optimal=0
      PathPoint glut_max2_l-P1: pelvis (-0.1349 0.0176 -0.0563)
      PathPoint glut_max2_l-P2: pelvis (-0.1376 -0.052 -0.0914)
      PathPoint glut_max2_l-P3: femur_l (-0.0426 -0.053 -0.0293)
      PathPoint glut_max2_l-P4: femur_l (-0.0156 -0.1016 -0.0419)
    Millard2012EquilibriumMuscle iliopsoas_l: min_control=0.01 max_control=1 max_isometric_force=2342
        optimal_fiber_length=0.1 tendon_slack_length=0.163 pennation_angle_at_optimal=0.1396263
      PathPoint psoas_l-P1: pelvis (-0.0647 0.0887 -0.0289)
      PathPoint psoas_l-P2: pelvis (-0.03 -0.01 -0.076)
      PathPoint psoas_l-P4: femur_l (0.033 -0.035 -0.0038)
      PathPoint psoas_l-P5: femur_l (-0.0188 -0.0597 -0.0104)
    Millard2012EquilibriumMuscle vasti_l: min_control=0.01 max_control=1 max_isometric_force=4530
        optimal_fiber_length=0.087 tendon_slack_length=0.136 pennation_angle_at_optimal=0.5235988
      PathPoint vas_int_l-P1: femur_l (0.029 -0.1924 -0.031)
      PathPoint vas_int_l-P2: femur_l (0.0335 -0.2084 -0.0285)
      PathPoint default: tibia_l (0.04 0.025 -0.0018)
    Millard2012EquilibriumMuscle gastroc_l: min_control=0.01 max_control=1 max_isometric_force=2241
        optimal_fiber_length=0.06 tendon_slack_length=0.39 pennation_angle_at_optimal=0.296706
      PathPoint med_gas_l-P1: femur_l (-0.02 -0.386 0.024)
      PathPoint med_gas_l-P2: calcn_l (0 0.031 0.0053)
    Millard2012EquilibriumMuscle soleus_l: min_control=0.01 max_control=1 max_isometric_force=3549
        optimal_fiber_length=0.05 tendon_slack_length=0.25 pennation_angle_at_optimal=0.4363323
      PathPoint P1: tibia_l (-0.0024 -0.1533 -0.0071)
      PathPoint P2: calcn_l (0 0.031 0.0053)
    Millard2012EquilibriumMuscle tibia_l: min_control=0.01 max_control=1 max_isometric_force=1759
        optimal_fiber_length=0.098 tendon_slack_length=0.223 pennation_angle_at_optimal=0.08726646
      PathPoint tib_ant_l-P1: tibia_l (0.0179 -0.1624 -0.0115)
      PathPoint tib_ant_l-P2: tibia_l (0.0329 -0.3951 0.0177)
      PathPoint tib_ant_l-P3: calcn_l (0.1166 0.0178 0.0305)
    HuntCrossleyForce heelR_ground_contact_force: transition_velocity=0.15
      ContactParametersSet contact_parameters:
        ContactParameters: geometry=(heelR_contact_geo ground_contact_geo) stiffness=2000000 dissipation=1
            static_friction=0.9 dynamic_friction=0.6 viscous_friction=0.6
    HuntCrossleyForce heelL_ground_contact_force: transition_velocity=0.15
      ContactParametersSet contact_parameters:
        ContactParameters: geometry=(heelL_contact_geo ground_contact_geo) stiffness=2000000 dissipation=1
            static_friction=0.9 dynamic_friction=0.6 viscous_friction=0.6
    HuntCrossleyForce toeR_ground_contact_force: transition_velocity=0.15
      ContactParametersSet contact_parameters:
        ContactParameters: geometry=(toeR_contact_geo ground_contact_geo) stiffness=2000000 dissipation=1
            static_friction=0.9 dynamic_friction=0.6 viscous_friction=0.6
    HuntCrossleyForce toeL_ground_contact_force: transition_velocity=0.15
      ContactParametersSet contact_parameters:
        ContactParameters: geometry=(toeL_contact_geo ground_contact_geo) stiffness=2000000 dissipation=1
            static_friction=0.9 dynamic_friction=0.6 viscous_friction=0.6
    CoordinateLimitForce knee_flexion_r_LimitForce: coordinate=knee_flexion_r upper_stiffness=10 [N*m/degree]
        upper_limit=-5 [degrees] lower_stiffness=10 [N*m/degree] lower_limit=-120 [degrees] damping=0.2
        transition=0.01 [degrees] compute_dissipation_energy=true
    CoordinateLimitForce knee_flexion_l_LimitForce: coordinate=knee_flexion_l upper_stiffness=10 upper_limit=-5
        lower_stiffness=10 lower_limit=-120 damping=0.2 transition=0.01 compute_dissipation_energy=true
  ContactGeometrySet:
    ContactHalfSpace ground_contact_geo: socket_frame=/ground location=(0 0 0) orientation=(0 0 -1.570796)
    ContactSphere heelR_contact_geo: socket_frame=/bodyset/calcn_r location=(0.015 0.015 -0.005) radius=0.03
    ContactSphere heelL_contact_geo: socket_frame=/bodyset/calcn_l location=(0.015 0.015 0.005) radius=0.03
    ContactSphere toeR_contact_geo: socket_frame=/bodyset/calcn_r location=(0.185 0.015 0) radius=0.03
    ContactSphere toeL_contact_geo: socket_frame=/bodyset/calcn_l location=(0.185 0.015 0) radius=0.03
  ProbeSet:
    Umberger2010MuscleMetabolicsProbe metabolics: probe_operation=integrate activation_maintenance_rate_on=true
        shortening_rate_on=true basal_rate_on=true mechanical_work_rate_on=true report_total_metabolics_only=true
      Umberger2010MuscleMetabolicsProbe_MetabolicMuscleParameterSet:
        Umberger2010MuscleMetabolicsProbe_MetabolicMuscleParameter hamstrings_r: ratio_slow_twitch_fibers=0.496
            use_provided_muscle_mass=false
        Umberger2010MuscleMetabolicsProbe_MetabolicMuscleParameter glut_max_r: ratio_slow_twitch_fibers=0.524
            use_provided_muscle_mass=false
        Umberger2010MuscleMetabolicsProbe_MetabolicMuscleParameter iliopsoas_r: ratio_slow_twitch_fibers=0.492
            use_provided_muscle_mass=false
        Umberger2010MuscleMetabolicsProbe_MetabolicMuscleParameter vasti_r: ratio_slow_twitch_fibers=0.474
            use_provided_muscle_mass=false
        Umberger2010MuscleMetabolicsProbe_MetabolicMuscleParameter gastroc_r: ratio_slow_twitch_fibers=0.489
            use_provided_muscle_mass=false
        Umberger2010MuscleMetabolicsProbe_MetabolicMuscleParameter soleus_r: ratio_slow_twitch_fibers=0.877
            use_provided_muscle_mass=false
        Umberger2010MuscleMetabolicsProbe_MetabolicMuscleParameter tibia_r: ratio_slow_twitch_fibers=0.73
            use_provided_muscle_mass=false
        Umberger2010MuscleMetabolicsProbe_MetabolicMuscleParameter hamstrings_l: ratio_slow_twitch_fibers=0.496
            use_provided_muscle_mass=false
        Umberger2010MuscleMetabolicsProbe_MetabolicMuscleParameter glut_max_l: ratio_slow_twitch_fibers=0.524
            use_provided_muscle_mass=false
        Umberger2010MuscleMetabolicsProbe_MetabolicMuscleParameter iliopsoas_l: ratio_slow_twitch_fibers=0.492
            use_provided_muscle_mass=false
        Umberger2010MuscleMetabolicsProbe_MetabolicMuscleParameter vasti_l: ratio_slow_twitch_fibers=0.474
            use_provided_muscle_mass=false
        Umberger2010MuscleMetabolicsProbe_MetabolicMuscleParameter gastroc_l: ratio_slow_twitch_fibers=0.489
            use_provided_muscle_mass=false
        Umberger2010MuscleMetabolicsProbe_MetabolicMuscleParameter soleus_l: ratio_slow_twitch_fibers=0.877
            use_provided_muscle_mass=false
        Umberger2010MuscleMetabolicsProbe_MetabolicMuscleParameter tibia_l: ratio_slow_twitch_fibers=0.73
            use_provided_muscle_mass=false
