# OpenSim document version 40500
Model human0918:
  gravity: 0 -9.80665 0
  length_units: meters
  force_units: N
  credits:
    Planar model with 9 degrees-of-freedom and 18 muscles. Developed by Thomas Geijtenbeek for use in predictive simulations. Latest revision: 2023-03-06. Base model adapted from Delp1992. Hamstrings parameters adapted from Arnold2010. Quadriceps parameters derived from Arnold2010 and Rajagopal2016.
  publications:
    Geijtenbeek, T.: SCONE: Open Source Software for Biological Motion, Journal of Open Source Software 4(38), 2019.
  Ground
  BodySet:
    Body pelvis: mass=11.777 [kg] mass_center=(-0.0707 0 0) inertia=(0.1028 0.0871 0.0579 0 0 0)
        meshes=(sacrum.vtp pelvis.vtp l_pelvis.vtp)
    Body femur_r: mass=9.3014 mass_center=(0 -0.17 0) inertia=(0.1339 0.0351 0.1412 0 0 0) meshes=femur.vtp
    Body tibia_r: mass=3.7075 mass_center=(0 -0.1867 0) inertia=(0.0504 0.0051 0.0511 0 0 0)
        meshes=(tibia.vtp fibula.vtp)
    Body calcn_r: mass=1.25 mass_center=(0.1 0.03 0) inertia=(0.0014 0.0039 0.0041 0 0 0)
        meshes=(talus.vtp bofoot.vtp foot.vtp)
    Body femur_l: mass=9.3014 mass_center=(0 -0.17 0) inertia=(0.1339 0.0351 0.1412 0 0 0) meshes=l_femur.vtp
    Body tibia_l: mass=3.7075 mass_center=(0 -0.1867 0) inertia=(0.0504 0.0051 0.0511 0 0 0)
        meshes=(l_tibia.vtp l_fibula.vtp)
    Body calcn_l: mass=1.25 mass_center=(0.1 0.03 0) inertia=(0.0014 0.0039 0.0041 0 0 0)
        meshes=(l_talus.vtp l_bofoot.vtp l_foot.vtp)
    Body torso: mass=34.2366 mass_center=(-0.03 0.32 0) inertia=(1.4745 0.7555 1.4314 0 0 0)
        meshes=(hat_spine.vtp hat_jaw.vtp hat_skull.vtp hat_ribs.vtp)
  JointSet:
    CustomJoint ground_pelvis: socket_parent_frame=ground_offset socket_child_frame=pelvis_offset
      Coordinate pelvis_tilt: default_value=0 range=(-1.570796 1.570796) clamped=false
      Coordinate pelvis_tx: default_value=0 range=(-5 5) clamped=false
      Coordinate pelvis_ty: default_value=1 range=(-1 2) clamped=false
      PhysicalOffsetFrame ground_offset: socket_parent=/ground translation=(0 0 0) [meters]
      PhysicalOffsetFrame pelvis_offset: socket_parent=/bodyset/pelvis translation=(0 0 0)
      SpatialTransform: axes_held_at_zero=(rotation2 rotation3 translation3)
        TransformAxis rotation1: coordinates=pelvis_tilt axis=(0 0 1) LinearFunction(coefficients=1 0)
        TransformAxis translation1: coordinates=pelvis_tx axis=(1 0 0) LinearFunction(coefficients=1 0)
        TransformAxis translation2: coordinates=pelvis_ty axis=(0 1 0) LinearFunction(coefficients=1 0)
    PinJoint hip_r: socket_parent_frame=pelvis_offset socket_child_frame=femur_r_offset
      Coordinate hip_flexion_r: default_value=0 range=(-0.5235988 2.094395) clamped=false
      PhysicalOffsetFrame pelvis_offset: socket_parent=/bodyset/pelvis translation=(-0.0707 -0.0661 0.0835)
      PhysicalOffsetFrame femur_r_offset: socket_parent=/bodyset/femur_r translation=(0 0 0)
    PinJoint knee_r: socket_parent_frame=femur_r_offset socket_child_frame=tibia_r_offset
      Coordinate knee_extension_r: default_value=0 range=(-2.094395 0.1745329) clamped=false
      PhysicalOffsetFrame femur_r_offset: socket_parent=/bodyset/femur_r translation=(0 -0.396 0)
      PhysicalOffsetFrame tibia_r_offset: socket_parent=/bodyset/tibia_r translation=(0 0 0)
    PinJoint ankle_r: socket_parent_frame=tibia_r_offset socket_child_frame=calcn_r_offset
      Coordinate ankle_dorsiflexion_r: default_value=0 range=(-1.047198 0.4363323) clamped=false
      PhysicalOffsetFrame tibia_r_offset: socket_parent=/bodyset/tibia_r translation=(0 -0.43 0)
      PhysicalOffsetFrame calcn_r_offset: socket_parent=/bodyset/calcn_r translation=(0.04877 0.04195 -0.00792)
    PinJoint hip_l: socket_parent_frame=pelvis_offset socket_child_frame=femur_l_offset
      Coordinate hip_flexion_l: default_value=0 range=(-0.5235988 2.094395) clamped=false
      PhysicalOffsetFrame pelvis_offset: socket_parent=/bodyset/pelvis translation=(-0.0707 -0.0661 -0.0835)
      PhysicalOffsetFrame femur_l_offset: socket_parent=/bodyset/femur_l translation=(0 0 0)
    PinJoint knee_l: socket_parent_frame=femur_l_offset socket_child_frame=tibia_l_offset
      Coordinate knee_extension_l: default_value=0 range=(-2.094395 0.1745329) clamped=false
      PhysicalOffsetFrame femur_l_offset: socket_parent=/bodyset/femur_l translation=(0 -0.396 0)
      PhysicalOffsetFrame tibia_l_offset: socket_parent=/bodyset/tibia_l translation=(0 0 0)
    PinJoint ankle_l: socket_parent_frame=tibia_l_offset socket_child_frame=calcn_l_offset
      Coordinate ankle_dorsiflexion_l: default_value=0 range=(-1.047198 0.4363323) clamped=false
      PhysicalOffsetFrame tibia_l_offset: socket_parent=/bodyset/tibia_l translation=(0 -0.43 0)
      PhysicalOffsetFrame calcn_l_offset: socket_parent=/bodyset/calcn_l translation=(0.04877 0.04195 0.00792)
    WeldJoint back: socket_parent_frame=pelvis_offset socket_child_frame=torso_offset
      PhysicalOffsetFrame pelvis_offset: socket_parent=/bodyset/pelvis translation=(-0.1007 0.0815 0)
      PhysicalOffsetFrame torso_offset: socket_parent=/bodyset/torso translation=(0 0 0)
  ForceSet:
    Millard2012EquilibriumMuscle [values shared by the 18 below unless stated]: optimal_force=1
        max_contraction_velocity=10 minimum_activation=0.01
      ActiveForceLengthCurve: minimum_value=0
      ForceVelocityCurve: concentric_slope_at_vmax=0 concentric_slope_near_vmax=0.25 isometric_slope=5
          eccentric_slope_at_vmax=0 eccentric_slope_near_vmax=0.15 max_eccentric_velocity_force_multiplier=1.4
      FiberForceLengthCurve
      TendonForceLengthCurve
    Millard2012EquilibriumMuscle hamstrings_r: max_isometric_force=5188 optimal_fiber_length=0.0976
        tendon_slack_length=0.319 pennation_angle_at_optimal=0.2025 [radians]
      PathPoint bifemlh_r-P1: pelvis (-0.12596 -0.10257 0.06944)
      PathPoint bifemlh_r-P2: tibia_r (-0.028 -0.02 0.02943)
      PathPoint bifemlh_r-P3: tibia_r (-0.021 -0.04 0.0343)
    Millard2012EquilibriumMuscle bifemsh_r: max_isometric_force=1608 optimal_fiber_length=0.1103
        tendon_slack_length=0.095 pennation_angle_at_optimal=0.2147
      PathPoint P1: femur_r (0.005 -0.2111 0.0234)
      PathPoint P2: tibia_r (-0.028 -0.02 0.02943)
      PathPoint P3: tibia_r (-0.021 -0.04 0.0343)
    Millard2012EquilibriumMuscle glut_max_r: max_isometric_force=3888 optimal_fiber_length=0.1569
        tendon_slack_length=0.111 pennation_angle_at_optimal=0.3822
      PathPoint glut_max2_r-P1: pelvis (-0.1349 0.0176 0.0563)
      PathPoint glut_max2_r-P2: pelvis (-0.1376 -0.052 0.0914)
      PathPoint glut_max2_r-P3: femur_r (-0.0426 -0.053 0.0293)
      PathPoint glut_max2_r-P4: femur_r (-0.0156 -0.1016 0.0419)
    Millard2012EquilibriumMuscle iliopsoas_r: max_isometric_force=4372 optimal_fiber_length=0.1066
        tendon_slack_length=0.152 pennation_angle_at_optimal=0.2496
      PathPoint psoas_r-P1: pelvis (-0.0647 0.0887 0.0289)
      PathPoint psoas_r-P2: pelvis (-0.03 -0.01 0.076)
      PathPoint psoas_r-P4: femur_r (0.033 -0.035 0.0038)
      PathPoint psoas_r-P5: femur_r (-0.0188 -0.0597 0.0104)
    Millard2012EquilibriumMuscle rect_fem_r: max_isometric_force=2338 optimal_fiber_length=0.0759
        tendon_slack_length=0.3449 pennation_angle_at_optimal=0.2426
      PathPoint P1: pelvis (-0.0295 -0.0311 0.0968)
      PathPoint P2: femur_r (0.038 -0.34 0.004)
      PathPoint P3: tibia_r (0.038 0.025 0.0018)
    Millard2012EquilibriumMuscle vasti_r: max_isometric_force=9060 optimal_fiber_length=0.0993
        tendon_slack_length=0.1231 pennation_angle_at_optimal=0.0785
      PathPoint vas_int_r-P1: femur_r (0.029 -0.1924 0.031)
      PathPoint vas_int_r-P2: femur_r (0.038 -0.34 0.007)
      PathPoint vas_int_r-P3: tibia_r (0.038 0.025 0.0018)
    Millard2012EquilibriumMuscle gastroc_r: max_isometric_force=4482 optimal_fiber_length=0.051
        tendon_slack_length=0.384 pennation_angle_at_optimal=0.1728
      PathPoint gas_med_r-P1: femur_r (-0.02 -0.388 -0.024)
      PathPoint gas_med_r-P3: calcn_r (0.005 0.031 -0.0053)
    Millard2012EquilibriumMuscle soleus_r: max_isometric_force=7098 optimal_fiber_length=0.044
        tendon_slack_length=0.248 pennation_angle_at_optimal=0.4939
      PathPoint P1: tibia_r (-0.0024 -0.1533 0.0071)
      PathPoint P2: calcn_r (0.005 0.031 -0.0053)
    Millard2012EquilibriumMuscle tib_ant_r: max_isometric_force=3158 optimal_fiber_length=0.0683
        tendon_slack_length=0.243 pennation_angle_at_optimal=0.1676
      PathPoint P1: tibia_r (0.0179 -0.1624 0.0115)
      PathPoint P2: tibia_r (0.0329 -0.3951 -0.0177)
      PathPoint P3: calcn_r (0.1166 0.0178 -0.0305)
    Millard2012EquilibriumMuscle hamstrings_l: max_isometric_force=5188 optimal_fiber_length=0.0976
        tendon_slack_length=0.319 pennation_angle_at_optimal=0.2025
      PathPoint bifemlh_l-P1: pelvis (-0.12596 -0.10257 -0.06944)
      PathPoint bifemlh_l-P2: tibia_l (-0.028 -0.02 -0.02943)
      PathPoint bifemlh_l-P3: tibia_l (-0.021 -0.04 -0.0343)
    Millard2012EquilibriumMuscle bifemsh_l: max_isometric_force=1608 optimal_fiber_length=0.1103
        tendon_slack_length=0.095 pennation_angle_at_optimal=0.2147
      PathPoint P1: femur_l (0.005 -0.2111 -0.0234)
      PathPoint P2: tibia_l (-0.028 -0.02 -0.02943)
      PathPoint P3: tibia_l (-0.021 -0.04 -0.0343)
    Millard2012EquilibriumMuscle glut_max_l: max_isometric_force=3888 optimal_fiber_length=0.1569
        tendon_slack_length=0.111 pennation_angle_at_optimal=0.3822
      PathPoint glut_max2_l-P1: pelvis (-0.1349 0.0176 -0.0563)
      PathPoint glut_max2_l-P2: pelvis (-0.1376 -0.052 -0.0914)
      PathPoint glut_max2_l-P3: femur_l (-0.0426 -0.053 -0.0293)
      PathPoint glut_max2_l-P4: femur_l (-0.0156 -0.1016 -0.0419)
    Millard2012EquilibriumMuscle iliopsoas_l: max_isometric_force=4372 optimal_fiber_length=0.1066
        tendon_slack_length=0.152 pennation_angle_at_optimal=0.2496
      PathPoint psoas_l-P1: pelvis (-0.0647 0.0887 -0.0289)
      PathPoint psoas_l-P2: pelvis (-0.03 -0.01 -0.076)
      PathPoint psoas_l-P4: femur_l (0.033 -0.035 -0.0038)
      PathPoint psoas_l-P5: femur_l (-0.0188 -0.0597 -0.0104)
    Millard2012EquilibriumMuscle rect_fem_l: max_isometric_force=2338 optimal_fiber_length=0.0759
        tendon_slack_length=0.3449 pennation_angle_at_optimal=0.2426
      PathPoint P1: pelvis (-0.0295 -0.0311 -0.0968)
      PathPoint P2: femur_l (0.038 -0.34 -0.004)
      PathPoint P3: tibia_l (0.038 0.025 -0.0018)
    Millard2012EquilibriumMuscle vasti_l: max_isometric_force=9060 optimal_fiber_length=0.0993
        tendon_slack_length=0.1231 pennation_angle_at_optimal=0.0785
      PathPoint vas_int_l-P1: femur_l (0.029 -0.1924 -0.031)
      PathPoint vas_int_l-P2: femur_l (0.038 -0.34 -0.007)
      PathPoint vas_int_l-P3: tibia_l (0.038 0.025 -0.0018)
    Millard2012EquilibriumMuscle gastroc_l: max_isometric_force=4482 optimal_fiber_length=0.051
        tendon_slack_length=0.384 pennation_angle_at_optimal=0.1728
      PathPoint gas_med_l-P1: femur_l (-0.02 -0.388 0.024)
      PathPoint gas_med_l-P3: calcn_l (0.005 0.031 0.0053)
    Millard2012EquilibriumMuscle soleus_l: max_isometric_force=7098 optimal_fiber_length=0.044
        tendon_slack_length=0.248 pennation_angle_at_optimal=0.4939
      PathPoint P1: tibia_l (-0.0024 -0.1533 -0.0071)
      PathPoint P2: calcn_l (0.005 0.031 0.0053)
    Millard2012EquilibriumMuscle tib_ant_l: max_isometric_force=3158 optimal_fiber_length=0.0683
        tendon_slack_length=0.243 pennation_angle_at_optimal=0.1676
      PathPoint P1: tibia_l (0.0179 -0.1624 -0.0115)
      PathPoint P2: tibia_l (0.0329 -0.3951 0.0177)
      PathPoint P3: calcn_l (0.1166 0.0178 0.0305)
    HuntCrossleyForce ground_heel_r: transition_velocity=0.1485289
      ContactParametersSet contact_parameters:
        ContactParameters: geometry=(platform heel_r) stiffness=1285852 dissipation=0.9983514 static_friction=0.9813053
            dynamic_friction=0.6860065 viscous_friction=0.3703621
    HuntCrossleyForce ground_toe_r: transition_velocity=0.1485289
      ContactParametersSet contact_parameters:
        ContactParameters: geometry=(platform toe_r) stiffness=1555936 dissipation=0.9983634 static_friction=0.9813053
            dynamic_friction=0.6860065 viscous_friction=0.3703621
    HuntCrossleyForce ground_tip_r: transition_velocity=0.1485289
      ContactParametersSet contact_parameters:
        ContactParameters: geometry=(platform tip_r) stiffness=2418050 dissipation=1.020204 static_friction=0.9813053
            dynamic_friction=0.6860065 viscous_friction=0.3703621
    HuntCrossleyForce ground_heel_l: transition_velocity=0.1485289
      ContactParametersSet contact_parameters:
        ContactParameters: geometry=(platform heel_l) stiffness=1285852 dissipation=0.9983514 static_friction=0.9813053
            dynamic_friction=0.6860065 viscous_friction=0.3703621
    HuntCrossleyForce ground_toe_l: transition_velocity=0.1485289
      ContactParametersSet contact_parameters:
        ContactParameters: geometry=(platform toe_l) stiffness=1555936 dissipation=0.9983634 static_friction=0.9813053
            dynamic_friction=0.6860065 viscous_friction=0.3703621
    HuntCrossleyForce ground_tip_l: transition_velocity=0.1485289
      ContactParametersSet contact_parameters:
        ContactParameters: geometry=(platform tip_l) stiffness=2418050 dissipation=1.020204 static_friction=0.9813053
            dynamic_friction=0.6860065 viscous_friction=0.3703621
    CoordinateLimitForce knee_lim_r: coordinate=knee_extension_r upper_stiffness=2 [N*m/degree]
        upper_limit=-5 [degrees] lower_stiffness=2 [N*m/degree] lower_limit=-120 [degrees] damping=0.5
        transition=0.01 [degrees]
    CoordinateLimitForce knee_lim_l: coordinate=knee_extension_l upper_stiffness=2 upper_limit=-5 lower_stiffness=2
        lower_limit=-120 damping=0.5 transition=0.01
  MarkerSet:
    Marker Sternum: torso (0.07 0.3 0)
    Marker R.Acromium: torso (-0.03 0.44 0.15)
    Marker L.Acromium: torso (-0.03 0.44 -0.15)
    Marker Top.Head: torso (0.00084 0.657 0)
    Marker R.ASIS: pelvis (0.02 0.03 0.128)
    Marker L.ASIS: pelvis (0.02 0.03 -0.128)
    Marker V.Sacral: pelvis (-0.16 0.04 0)
    Marker R.Thigh.Upper: femur_r (0.018 -0.2 0.064)
    Marker R.Thigh.Front: femur_r (0.08 -0.25 0.0047)
    Marker R.Thigh.Rear: femur_r (0.01 -0.3 0.06)
    Marker R.Knee.Lat: femur_r (0 -0.404 0.05)
    Marker R.Knee.Med: femur_r (0 -0.404 -0.05)
    Marker R.Shank.Upper: tibia_r (0.005 -0.065 0.05)
    Marker R.Shank.Front: tibia_r (0.05 -0.08 0)
    Marker R.Shank.Rear: tibia_r (0.02 -0.13 0.05)
    Marker R.Ankle.Lat: tibia_r (-0.005 -0.41 0.053)
    Marker R.Ankle.Med: tibia_r (0.006 -0.3888 -0.038)
    Marker R.Heel: calcn_r (-0.02 0.02 0)
    Marker R.Midfoot.Sup: calcn_r (0.13 0.03 -0.03)
    Marker R.Midfoot.Lat: calcn_r (0.1 0.02 0.04)
    Marker R.Toe.Lat: calcn_r (0.19 0 0.065)
    Marker R.Toe.Med: calcn_r (0.19 0.005 -0.04)
    Marker R.Toe.Tip: calcn_r (0.26 0.005 0)
    Marker L.Thigh.Upper: femur_l (0.018 -0.2 -0.064)
    Marker L.Thigh.Front: femur_l (0.08 -0.25 -0.0047)
    Marker L.Thigh.Rear: femur_l (0.01 -0.3 -0.06)
    Marker L.Knee.Lat: femur_l (0 -0.404 -0.05)
    Marker L.Knee.Med: femur_l (0 -0.404 0.05)
    Marker L.Shank.Upper: tibia_l (0.005 -0.065 -0.05)
    Marker L.Shank.Front: tibia_l (0.05 -0.08 0)
    Marker L.Shank.Rear: tibia_l (-0.02 -0.13 -0.05)
    Marker L.Ankle.Lat: tibia_l (-0.005 -0.41 -0.053)
    Marker L.Ankle.Med: tibia_l (0.006 -0.3888 0.038)
    Marker L.Heel: calcn_l (-0.02 0.02 0)
    Marker L.Midfoot.Sup: calcn_l (0.13 0.03 0.03)
    Marker L.Midfoot.Lat: calcn_l (0.1 0.02 -0.04)
    Marker L.Toe.Lat: calcn_l (0.19 0 -0.065)
    Marker L.Toe.Med: calcn_l (0.19 0.005 0.04)
    Marker L.Toe.Tip: calcn_l (0.26 0.005 0)
  ContactGeometrySet:
    ContactHalfSpace platform: socket_frame=/ground location=(0 0 0) orientation=(0 0 -1.570796)
    ContactSphere heel_r: socket_frame=/bodyset/calcn_r location=(0.02988359 -0.006501946 -0.005) radius=0.03
    ContactSphere toe_r: socket_frame=/bodyset/calcn_r location=(0.1816506 0.006658054 0) radius=0.03
    ContactSphere tip_r: socket_frame=/bodyset/calcn_r location=(0.2105188 0.0001880544 0) radius=0.022
    ContactSphere heel_l: socket_frame=/bodyset/calcn_l location=(0.02988359 -0.006501946 0.005) radius=0.03
    ContactSphere toe_l: socket_frame=/bodyset/calcn_l location=(0.1816506 0.006658054 0) radius=0.03
    ContactSphere tip_l: socket_frame=/bodyset/calcn_l location=(0.2105188 0.0001880544 0) radius=0.022
  ProbeSet:
    Umberger2010MuscleMetabolicsProbe metabolics: probe_operation=integrate initial_conditions_for_integration=0
        activation_maintenance_rate_on=true shortening_rate_on=true basal_rate_on=true mechanical_work_rate_on=true
        report_total_metabolics_only=true
      Umberger2010MuscleMetabolicsProbe_MetabolicMuscleParameterSet:
        Umberger2010MuscleMetabolicsProbe_MetabolicMuscleParameter hamstrings_r: ratio_slow_twitch_fibers=0.496
            use_provided_muscle_mass=false
        Umberger2010MuscleMetabolicsProbe_MetabolicMuscleParameter bifemsh_r: ratio_slow_twitch_fibers=0.669
            use_provided_muscle_mass=false
        Umberger2010MuscleMetabolicsProbe_MetabolicMuscleParameter glut_max_r: ratio_slow_twitch_fibers=0.524
            use_provided_muscle_mass=false
        Umberger2010MuscleMetabolicsProbe_MetabolicMuscleParameter iliopsoas_r: ratio_slow_twitch_fibers=0.492
            use_provided_muscle_mass=false
        Umberger2010MuscleMetabolicsProbe_MetabolicMuscleParameter rect_fem_r: ratio_slow_twitch_fibers=0.378
            use_provided_muscle_mass=false
        Umberger2010MuscleMetabolicsProbe_MetabolicMuscleParameter vasti_r: ratio_slow_twitch_fibers=0.474
            use_provided_muscle_mass=false
        Umberger2010MuscleMetabolicsProbe_MetabolicMuscleParameter gastroc_r: ratio_slow_twitch_fibers=0.489
            use_provided_muscle_mass=false
        Umberger2010MuscleMetabolicsProbe_MetabolicMuscleParameter soleus_r: ratio_slow_twitch_fibers=0.877
            use_provided_muscle_mass=false
        Umberger2010MuscleMetabolicsProbe_MetabolicMuscleParameter tib_ant_r: ratio_slow_twitch_fibers=0.73
            use_provided_muscle_mass=false
        Umberger2010MuscleMetabolicsProbe_MetabolicMuscleParameter hamstrings_l: ratio_slow_twitch_fibers=0.496
            use_provided_muscle_mass=false
        Umberger2010MuscleMetabolicsProbe_MetabolicMuscleParameter bifemsh_l: ratio_slow_twitch_fibers=0.669
            use_provided_muscle_mass=false
        Umberger2010MuscleMetabolicsProbe_MetabolicMuscleParameter glut_max_l: ratio_slow_twitch_fibers=0.524
            use_provided_muscle_mass=false
        Umberger2010MuscleMetabolicsProbe_MetabolicMuscleParameter iliopsoas_l: ratio_slow_twitch_fibers=0.492
            use_provided_muscle_mass=false
        Umberger2010MuscleMetabolicsProbe_MetabolicMuscleParameter rect_fem_l: ratio_slow_twitch_fibers=0.378
            use_provided_muscle_mass=false
        Umberger2010MuscleMetabolicsProbe_MetabolicMuscleParameter vasti_l: ratio_slow_twitch_fibers=0.474
            use_provided_muscle_mass=false
        Umberger2010MuscleMetabolicsProbe_MetabolicMuscleParameter gastroc_l: ratio_slow_twitch_fibers=0.489
            use_provided_muscle_mass=false
        Umberger2010MuscleMetabolicsProbe_MetabolicMuscleParameter soleus_l: ratio_slow_twitch_fibers=0.877
            use_provided_muscle_mass=false
        Umberger2010MuscleMetabolicsProbe_MetabolicMuscleParameter tib_ant_l: ratio_slow_twitch_fibers=0.73
            use_provided_muscle_mass=false
