# OpenSim document version 40500
Model subject01:
  gravity: 0 -9.80665 0
  Ground
  BodySet:
    Body pelvis: mass=11.47181 [kg] mass_center=(-0.0724376 0 0) inertia=(0.1051186 0.08906452 0.05920592 0 0 0)
        meshes=(sacrum.vtp pelvis.vtp l_pelvis.vtp)
    Body femur_r: mass=9.060364 mass_center=(0 -0.1950308 0) inertia=(0.1716669 0.04500005 0.1810259 0 0 0)
        meshes=femur.vtp
    Body tibia_r: mass=3.611424 mass_center=(0 -0.1845572 0) inertia=(0.0479735 0.004854462 0.0486398 0 0 0)
        meshes=(tibia_r.vtp fibula.vtp)
    Body calcn_r: mass=1.217608 mass_center=(0.1027085 0.03081254 0)
        inertia=(0.001438593 0.004007509 0.004213022 0 0 0) meshes=(talus.vtp bofoot.vtp foot.vtp)
    Body femur_l: mass=9.060364 mass_center=(0 -0.1950308 0) inertia=(0.1716669 0.04500005 0.1810259 0 0 0)
        meshes=l_femur.vtp
    Body tibia_l: mass=3.611424 mass_center=(0 -0.1845572 0) inertia=(0.0479735 0.004854462 0.0486398 0 0 0)
        meshes=(tibia_l.vtp l_fibula.vtp)
    Body calcn_l: mass=1.217608 mass_center=(0.1027085 0.03081254 0)
        inertia=(0.001438593 0.004007509 0.004213022 0 0 0) meshes=(l_talus.vtp l_bofoot.vtp l_foot.vtp)
    Body torso: mass=33.3494 mass_center=(0.05481061 0.3455104 0.02825083) inertia=(1.67442 0.8579343 1.625476 0 0 0)
        meshes=(hat_spine.vtp hat_jaw.vtp hat_skull.vtp hat_ribs.vtp)
  JointSet:
    CustomJoint ground_pelvis: socket_parent_frame=ground_offset socket_child_frame=pelvis_offset
      Coordinate pelvis_list: range=(-1.570796 1.570796)
      Coordinate pelvis_rotation: range=(-1.570796 1.570796)
      Coordinate pelvis_tilt: range=(-1.570796 1.570796)
      Coordinate pelvis_tx: range=(-5 5)
      Coordinate pelvis_ty: default_value=0.95 range=(-1 2)
      Coordinate pelvis_tz: range=(-3 3)
      PhysicalOffsetFrame ground_offset: socket_parent=/ground translation=(0 0 0) [meters]
      PhysicalOffsetFrame pelvis_offset: socket_parent=/bodyset/pelvis translation=(0 0 0)
      SpatialTransform:
        TransformAxis rotation1: coordinates=pelvis_list axis=(1 0 0) LinearFunction(coefficients=1 0)
        TransformAxis rotation2: coordinates=pelvis_rotation axis=(0 1 0) LinearFunction(coefficients=1 0)
        TransformAxis rotation3: coordinates=pelvis_tilt axis=(0 0 1) LinearFunction(coefficients=1 0)
        TransformAxis translation1: coordinates=pelvis_tx axis=(1 0 0) LinearFunction(coefficients=1 0)
        TransformAxis translation2: coordinates=pelvis_ty axis=(0 1 0) LinearFunction(coefficients=1 0)
        TransformAxis translation3: coordinates=pelvis_tz axis=(0 0 1) LinearFunction(coefficients=1 0)
    CustomJoint hip_r: socket_parent_frame=pelvis_offset socket_child_frame=femur_r_offset
      Coordinate hip_adduction_r: range=(-2.094395 2.094395)
      Coordinate hip_rotation_r: range=(-2.094395 2.094395)
      Coordinate hip_flexion_r: range=(-2.094395 2.094395)
      PhysicalOffsetFrame pelvis_offset: socket_parent=/bodyset/pelvis translation=(-0.0724376 -0.06772454 0.08555218)
      PhysicalOffsetFrame femur_r_offset: socket_parent=/bodyset/femur_r translation=(0 0 0)
      SpatialTransform: axes_held_at_zero=(translation1 translation2 translation3)
        TransformAxis rotation1: coordinates=hip_adduction_r axis=(1 0 0) LinearFunction(coefficients=1 0)
        TransformAxis rotation2: coordinates=hip_rotation_r axis=(0 1 0) LinearFunction(coefficients=1 0)
        TransformAxis rotation3: coordinates=hip_flexion_r axis=(0 0 1) LinearFunction(coefficients=1 0)
    CustomJoint hip_l: socket_parent_frame=pelvis_offset socket_child_frame=femur_l_offset
      Coordinate hip_adduction_l: range=(-2.094395 2.094395)
      Coordinate hip_rotation_l: range=(-2.094395 2.094395)
      Coordinate hip_flexion_l: range=(-2.094395 2.094395)
      PhysicalOffsetFrame pelvis_offset: socket_parent=/bodyset/pelvis translation=(-0.0724376 -0.06772454 -0.08555218)
      PhysicalOffsetFrame femur_l_offset: socket_parent=/bodyset/femur_l translation=(0 0 0)
      SpatialTransform: axes_held_at_zero=(translation1 translation2 translation3)
        TransformAxis rotation1: coordinates=hip_adduction_l axis=(1 0 0) LinearFunction(coefficients=1 0)
        TransformAxis rotation2: coordinates=hip_rotation_l axis=(0 1 0) LinearFunction(coefficients=1 0)
        TransformAxis rotation3: coordinates=hip_flexion_l axis=(0 0 1) LinearFunction(coefficients=1 0)
    PinJoint knee_r: socket_parent_frame=femur_r_offset socket_child_frame=tibia_r_offset
      Coordinate knee_flexion_r: range=(-2.094395 0.1745329)
      PhysicalOffsetFrame femur_r_offset: socket_parent=/bodyset/femur_r translation=(0 -0.454307 0)
      PhysicalOffsetFrame tibia_r_offset: socket_parent=/bodyset/tibia_r translation=(0 0 0)
    PinJoint knee_l: socket_parent_frame=femur_l_offset socket_child_frame=tibia_l_offset
      Coordinate knee_flexion_l: range=(-2.094395 0.1745329)
      PhysicalOffsetFrame femur_l_offset: socket_parent=/bodyset/femur_l translation=(0 -0.454307 0)
      PhysicalOffsetFrame tibia_l_offset: socket_parent=/bodyset/tibia_l translation=(0 0 0)
    PinJoint ankle_r: socket_parent_frame=tibia_r_offset socket_child_frame=calcn_r_offset
      Coordinate ankle_dorsiflexion_r: range=(-1.047198 1.047198)
      PhysicalOffsetFrame tibia_r_offset: socket_parent=/bodyset/tibia_r translation=(0 -0.4250649 0)
      PhysicalOffsetFrame calcn_r_offset: socket_parent=/bodyset/calcn_r
          translation=(0.05009092 0.04308621 -0.008134511)
    PinJoint ankle_l: socket_parent_frame=tibia_l_offset socket_child_frame=calcn_l_offset
      Coordinate ankle_dorsiflexion_l: range=(-1.047198 1.047198)
      PhysicalOffsetFrame tibia_l_offset: socket_parent=/bodyset/tibia_l translation=(0 -0.4250649 0)
      PhysicalOffsetFrame calcn_l_offset: socket_parent=/bodyset/calcn_l
          translation=(0.05009092 0.04308621 0.008134511)
    WeldJoint back: socket_parent_frame=pelvis_offset socket_child_frame=torso_offset
      PhysicalOffsetFrame pelvis_offset: socket_parent=/bodyset/pelvis translation=(-0.1031749 0.08350303 0)
      PhysicalOffsetFrame torso_offset: socket_parent=/bodyset/torso translation=(0 0 0)
  ForceSet:
    Millard2012EquilibriumMuscle [values shared by the 14 below unless stated]:
      ActiveForceLengthCurve: minimum_value=0
      ForceVelocityCurve: concentric_slope_at_vmax=0 concentric_slope_near_vmax=0.25 isometric_slope=5
          eccentric_slope_at_vmax=0 eccentric_slope_near_vmax=0.15 max_eccentric_velocity_force_multiplier=1.4
      FiberForceLengthCurve
      TendonForceLengthCurve
    Millard2012EquilibriumMuscle hamstrings_r: min_control=0.01 max_control=1 max_isometric_force=2594
        optimal_fiber_length=0.1242408 tendon_slack_length=0.3533455 pennation_angle_at_optimal=0 [radians]
      PathPoint bifemlh_r-P1: pelvis (-0.1290557 -0.1050909 0.07114663)
      PathPoint bifemlh_r-P2: tibia_r (-0.02767864 -0.01977046 0.02909223)
      PathPoint bifemlh_r-P3: tibia_r (-0.02075898 -0.03954092 0.03390634)
    Millard2012EquilibriumMuscle glut_max_r: min_control=0.01 max_control=1 max_isometric_force=1944
        optimal_fiber_length=0.1593947 tendon_slack_length=0.1377084 pennation_angle_at_optimal=0
      PathPoint glut_max2_r-P1: pelvis (-0.1382154 0.01803256 0.05768369)
      PathPoint glut_max2_r-P2: pelvis (-0.1409818 -0.05327801 0.09364634)
      PathPoint glut_max2_r-P3: femur_r (-0.04887242 -0.06080372 0.03361413)
      PathPoint glut_max2_r-P4: femur_r (-0.01789694 -0.1165596 0.04806936)
    Millard2012EquilibriumMuscle ilipsoas_r: min_control=0.01 max_control=1 max_isometric_force=2342
        optimal_fiber_length=0.1066706 tendon_slack_length=0.1738732 pennation_angle_at_optimal=0.1396263
      PathPoint psoas_r-P1: pelvis (-0.06629013 0.09087998 0.02961028)
      PathPoint psoas_r-P2: pelvis (-0.03073731 -0.01024577 0.07786785)
      PathPoint psoas_r-P4: femur_r (0.03785892 -0.0401534 0.004359512)
      PathPoint psoas_r-P5: femur_r (-0.02156811 -0.06849023 0.0119313)
    Millard2012EquilibriumMuscle vasti_r: min_control=0.01 max_control=1 max_isometric_force=4530
        optimal_fiber_length=0.101638 tendon_slack_length=0.1588824 pennation_angle_at_optimal=0.5235988
      PathPoint vas_int_r-P1: femur_r (0.03326996 -0.220729 0.03556444)
      PathPoint vas_int_r-P2: femur_r (0.03843254 -0.2390848 0.03269634)
      PathPoint default: tibia_r (0.03954092 0.02471308 0.001779341)
    Millard2012EquilibriumMuscle gastroc_r: min_control=0.01 max_control=1 max_isometric_force=2241
        optimal_fiber_length=0.05959873 tendon_slack_length=0.3873917 pennation_angle_at_optimal=0.296706
      PathPoint med_gas_r-P1: femur_r (-0.0229448 -0.4428346 -0.02753376)
      PathPoint med_gas_r-P2: calcn_r (0 0.03183963 -0.005443549)
    Millard2012EquilibriumMuscle soleus_r: min_control=0.01 max_control=1 max_isometric_force=3549
        optimal_fiber_length=0.04954971 tendon_slack_length=0.2477485 pennation_angle_at_optimal=0.4363323
      PathPoint P1: tibia_r (-0.002372455 -0.1515406 0.007018513)
      PathPoint P2: calcn_r (0 0.03183963 -0.005443549)
    Millard2012EquilibriumMuscle tibia_r: min_control=0.01 max_control=1 max_isometric_force=1759
        optimal_fiber_length=0.09759006 tendon_slack_length=0.2220672 pennation_angle_at_optimal=0.08726646
      PathPoint tib_ant_r-P1: tibia_r (0.01769456 -0.1605361 0.01136801)
      PathPoint tib_ant_r-P2: tibia_r (0.03252241 -0.3905654 -0.01749686)
      PathPoint tib_ant_r-P3: calcn_r (0.1197581 0.01828211 -0.03132609)
    Millard2012EquilibriumMuscle hamstrings_l: min_control=0.01 max_control=1 max_isometric_force=2594
        optimal_fiber_length=0.1242408 tendon_slack_length=0.3533455 pennation_angle_at_optimal=0
      PathPoint bifemlh_l-P1: pelvis (-0.1290557 -0.1050909 -0.07114663)
      PathPoint bifemlh_l-P2: tibia_l (-0.02767864 -0.01977046 -0.02909223)
      PathPoint bifemlh_l-P3: tibia_l (-0.02075898 -0.03954092 -0.03390634)
    Millard2012EquilibriumMuscle glut_max_l: min_control=0.01 max_control=1 max_isometric_force=1944
        optimal_fiber_length=0.1593947 tendon_slack_length=0.1377084 pennation_angle_at_optimal=0
      PathPoint glut_max2_l-P1: pelvis (-0.1382154 0.01803256 -0.05768369)
      PathPoint glut_max2_l-P2: pelvis (-0.1409818 -0.05327801 -0.09364634)
      PathPoint glut_max2_l-P3: femur_l (-0.04887242 -0.06080372 -0.03361413)
      PathPoint glut_max2_l-P4: femur_l (-0.01789694 -0.1165596 -0.04806936)
    Millard2012EquilibriumMuscle ilipsoas_l: min_control=0.01 max_control=1 max_isometric_force=2342
        optimal_fiber_length=0.1066706 tendon_slack_length=0.1738732 pennation_angle_at_optimal=0.1396263
      PathPoint psoas_l-P1: pelvis (-0.06629013 0.09087998 -0.02961028)
      PathPoint psoas_l-P2: pelvis (-0.03073731 -0.01024577 -0.07786785)
      PathPoint psoas_l-P4: femur_l (0.03785892 -0.0401534 -0.004359512)
      PathPoint psoas_l-P5: femur_l (-0.02156811 -0.06849023 -0.0119313)
    Millard2012EquilibriumMuscle vasti_l: min_control=0.01 max_control=1 max_isometric_force=4530
        optimal_fiber_length=0.101638 tendon_slack_length=0.1588824 pennation_angle_at_optimal=0.5235988
      PathPoint vas_int_l-P1: femur_l (0.03326996 -0.220729 -0.03556444)
      PathPoint vas_int_l-P2: femur_l (0.03843254 -0.2390848 -0.03269634)
      PathPoint default: tibia_l (0.03954092 0.02471308 -0.001779341)
    Millard2012EquilibriumMuscle gastroc_l: min_control=0.01 max_control=1 max_isometric_force=2241
        optimal_fiber_length=0.05959873 tendon_slack_length=0.3873917 pennation_angle_at_optimal=0.296706
      PathPoint med_gas_l-P1: femur_l (-0.0229448 -0.4428346 0.02753376)
      PathPoint med_gas_l-P2: calcn_l (0 0.03183963 0.005443549)
    Millard2012EquilibriumMuscle soleus_l: min_control=0.01 max_control=1 max_isometric_force=3549
        optimal_fiber_length=0.04954971 tendon_slack_length=0.2477485 pennation_angle_at_optimal=0.4363323
      PathPoint P1: tibia_l (-0.002372455 -0.1515406 -0.007018513)
      PathPoint P2: calcn_l (0 0.03183963 0.005443549)
    Millard2012EquilibriumMuscle tibia_l: min_control=0.01 max_control=1 max_isometric_force=1759
        optimal_fiber_length=0.09759006 tendon_slack_length=0.2220672 pennation_angle_at_optimal=0.08726646
      PathPoint tib_ant_l-P1: tibia_l (0.01769456 -0.1605361 -0.01136801)
      PathPoint tib_ant_l-P2: tibia_l (0.03252241 -0.3905654 0.01749686)
      PathPoint tib_ant_l-P3: calcn_l (0.1197581 0.01828211 0.03132609)
    HuntCrossleyForce heelR_ground_contact_force: transition_velocity=0.15
      ContactParametersSet contact_parameters:
        ContactParameters: geometry=(heelR_contact_geo ground_contact_geo) stiffness=2000000 dissipation=1
            static_friction=0.9 dynamic_friction=0.6 viscous_friction=0.6
    HuntCrossleyForce heelL_ground_contact_force: transition_velocity=0.15
      ContactParametersSet contact_parameters:
        ContactParameters: geometry=(heelL_contact_geo ground_contact_geo) stiffness=2000000 dissipation=1
            static_friction=0.9 dynamic_friction=0.6 viscous_friction=0.6
    HuntCrossleyForce toeR_ground_contact_force: transition_velocity=0.15
      ContactParametersSet contact_parameters:
        ContactParameters: geometry=(toeR_contact_geo ground_contact_geo) stiffness=2000000 dissipation=1
            static_friction=0.9 dynamic_friction=0.6 viscous_friction=0.6
    HuntCrossleyForce toeL_ground_contact_force: transition_velocity=0.15
      ContactParametersSet contact_parameters:
        ContactParameters: geometry=(toeL_contact_geo ground_contact_geo) stiffness=2000000 dissipation=1
            static_friction=0.9 dynamic_friction=0.6 viscous_friction=0.6
  MarkerSet:
    Marker Sternum: torso (0.1222214 0.3069137 0.00172666)
    Marker R.Acromium: torso (0.001364912 0.4279629 0.1710337)
    Marker L.Acromium: torso (0.004322086 0.4433565 -0.1694758)
    Marker Top.Head: torso (0.101983 0.6960065 0.01370422)
    Marker R.ASIS: pelvis (0.02244506 0.03629051 0.1307306)
    Marker L.ASIS: pelvis (0.02777373 0.02735565 -0.1312759)
    Marker V.Sacral: pelvis (-0.1728766 0.04216337 0.007407257)
    Marker R.Thigh.Upper: femur_r (0.04665429 -0.2187472 0.09140635)
    Marker R.Thigh.Front: femur_r (0.1081789 -0.2799126 -0.001472336)
    Marker R.Thigh.Rear: femur_r (0.03667701 -0.3396431 0.08140807)
    Marker R.Knee.Lat: femur_r (-0.002038572 -0.4252069 0.06126457)
    Marker R.Knee.Med: femur_r (0.001281027 -0.441751 -0.06001126)
    Marker R.Shank.Upper: tibia_r (-0.02940083 -0.05934375 0.07024459)
    Marker R.Shank.Front: tibia_r (0.04826368 -0.09333895 0.01897883)
    Marker R.Shank.Rear: tibia_r (-0.01270074 -0.1442895 0.08015257)
    Marker R.Ankle.Lat: tibia_r (-0.005266032 -0.4295256 0.05513707)
    Marker R.Ankle.Med: tibia_r (0.006010902 -0.4148358 -0.03370482)
    Marker R.Heel: calcn_r (-0.02244745 0.01398842 -0.005124744)
    Marker R.Midfoot.Sup: calcn_r (0.1204389 0.03145003 -0.03997984)
    Marker R.Midfoot.Lat: calcn_r (0.1161538 0.00486564 0.06588497)
    Marker R.Toe.Lat: calcn_r (0.2063582 -0.01719568 0.07323969)
    Marker R.Toe.Med: calcn_r (0.2078907 0.002713796 -0.03416523)
    Marker R.Toe.Tip: calcn_r (0.2689214 0.002849948 -0.002588338)
    Marker L.Thigh.Upper: femur_l (0.02246381 -0.2056667 -0.09771649)
    Marker L.Thigh.Front: femur_l (0.1103555 -0.2471733 -0.03337392)
    Marker L.Thigh.Rear: femur_l (0.01546288 -0.3145668 -0.08194687)
    Marker L.Knee.Lat: femur_l (-0.007900732 -0.4448157 -0.06397419)
    Marker L.Knee.Med: femur_l (0.008711726 -0.4448438 0.05108797)
    Marker L.Shank.Upper: tibia_l (-0.009033799 -0.07086589 -0.07941386)
    Marker L.Shank.Front: tibia_l (0.04277929 -0.120147 -0.03043616)
    Marker L.Shank.Rear: tibia_l (-0.02693611 -0.114236 -0.0879009)
    Marker L.Ankle.Lat: tibia_l (-0.001085506 -0.4276664 -0.05689854)
    Marker L.Ankle.Med: tibia_l (0.01472633 -0.4042969 0.03315261)
    Marker L.Heel: calcn_l (-0.02433136 0.02318362 0.006262622)
    Marker L.Midfoot.Sup: calcn_l (0.1474722 0.03381142 0.03415943)
    Marker L.Midfoot.Lat: calcn_l (0.1308103 0.01494269 -0.06295396)
    Marker L.Toe.Lat: calcn_l (0.1945842 -0.00870991 -0.06796246)
    Marker L.Toe.Med: calcn_l (0.2098421 0.01077846 0.03260348)
    Marker L.Toe.Tip: calcn_l (0.2594556 0.007725003 0.008301871)
  ContactGeometrySet:
    ContactHalfSpace ground_contact_geo: socket_frame=/ground location=(0 0 0) orientation=(0 0 -1.570796)
    ContactSphere heelR_contact_geo: socket_frame=/bodyset/calcn_r location=(0.015 0.015 -0.005) radius=0.03
    ContactSphere heelL_contact_geo: socket_frame=/bodyset/calcn_l location=(0.015 0.015 0.005) radius=0.03
    ContactSphere toeR_contact_geo: socket_frame=/bodyset/calcn_r location=(0.185 0.015 0) radius=0.03
    ContactSphere toeL_contact_geo: socket_frame=/bodyset/calcn_l location=(0.185 0.015 0) radius=0.03
